Fri May 10 12:27:42 EDT 2019
$PROBLEM    QE-TMDD model for human studies
; 1) remove all FIX parameters (TMDD201.ctl), [~12 minutes]

; 2) re-write M3 method and error structure to avoid the nest if error,

;    also used nmdat2.csv (add column of BLOQ)

; 3) add time-dependent CL component

;;-------------------------------------------------------------------------------------;;

;; QE-TMDD model with 2 binding sites (Gibianski 2017)                                 ;;

;; log Additive + proportional error model                                             ;;

;; IIV in Kin and Kout                                                                 ;;

;;                                                                                     ;;

;; Final PK model: With WTKG on CL [pow]                                               ;;

;; Covariance estiamted on IIV in CL, V2 and V2, KA                                    ;;

;;                                   						       ;;

;; QE-TMDD model for human							       ;;

;; PK parameter fixed to the final pk model: ../final/final-pk-model-01.ctl            ;;

;;                                                                                     ;;

;; No IIV on KOUT                                                                      ;;

;;-------------------------------------------------------------------------------------;;
$INPUT      ROWID ID ARMAN NTIM TIME AMT RATE EVID DV ODV CMT MDV
            TESTN EXDOSE ROUTIV EXTDOSE AGE SEXN RACEN WTKG HGTBL
            BMIBL CONC DELFLAG BLOQ
$DATA      nmdat2.csv IGNORE=@ IGNORE=(DELFLAG.EQ.1)
$THETA  0.270993 ; th1 - TVCL: CLEARANCE (L/Day)
 3.08523 ; th2 - TVV2: Central volume of distribution (L)
 0.0181932 ; th3 - TVQ: Intercompartmental clearance (L/Day)
 0.366136 ; th4 - TVV3: Peripheral volume of distribution (L)
 0.657177 ; th5 - TVF1: Bioavailability
 0.151185 ; th6 - TVKA: First-order absorption rate constant (1/Day)
 -1.11142 ; th7 - Additive RV term
 -2.52728 ; th8 - Proportional RV term
 0.951618 ; th9 - Weight effect pm CL
 (0,500) ; th10 - KD: Equilibrium dissociation constant (mg/L)
 (0,15) ; th11 - KIN: Protein synthetic constant (mg/L/Day)
 (0,0.2) ; th12 - KOUT: Protein degradation rate (1/Day)
 -0.50 ; EMAX
 (0,30.0) ; T50
 (0,2.0) ; HILL
$OMEGA  BLOCK(3)
 0.0434947  ; eta1 - IIV in CL
 -0.0149456 0.00702114  ; eta2 - IIV in V2
 0 -0.0147029 0.114653  ; eta3 - IIV in KA
$OMEGA  0.0618751  ; eta4 - IIV in V3
 1.5  ; eta5 - IIV in KD
 0.01  ; eta6 - IIV in Kin
 0.01  ; eta7 - IIV in Kout
$OMEGA  0.1  ;   IIV_EMAX
 0.1  ;    IIV_T50
$SIGMA  1  ; eps1 - RV for PK  [add]
 0.1  ; eps2 - RV for PD [add]
$SUBROUTINE ADVAN13 TOL=9
$MODEL      NCOMP=4 COMP(Depot) COMP(Central,DEFOBS) COMP(Periph)
            COMP(Protein)
$PK

 IF (NEWIND.EQ.0) THEN
 LLOQ1=0.078
 ENDIF

 MWTKG = 68.5   ;median weight (kg)
 MAGE = 34      ;median age (y)

 SEXF=0
 IF (SEXN.EQ.2) SEXF=1

 RACW=0
 IF (RACEN.EQ.1) RACW=1

 TVCL = THETA(1)*(WTKG/MWTKG)**THETA(9)
 CL = TVCL*EXP(ETA(1))


 ;CL IS TIME-DEPENDENT
TVEMAX = THETA(13)
TVT50 = THETA(14)
HILL = THETA(15)
 EMAX = TVEMAX*EXP(ETA(8))             ; INDIVIDUAL EMAX
 T50 = TVT50*EXP(ETA(9))               ; INDIVIDUAL T50
 CL = CL*EXP(EMAX*TIME**HILL/(T50**HILL+TIME**HILL))     ; Sigmoid Emax model


 TVV2 = THETA(2)
 V2 = TVV2*EXP(ETA(2))

 TVQ  = THETA(3)
 Q = TVQ

 TVV3 = THETA(4)
 V3 = TVV3*EXP(ETA(4))

 F1  = THETA(5)

 TVKA = THETA(6)
 KA = TVKA*EXP(ETA(3))

 TVKD = THETA(10)
 KD = TVKD*EXP(ETA(5))

 TVKIN = THETA(11)
 KIN = TVKIN*EXP(ETA(6))

 TVKOUT = THETA(12)
 KOUT = TVKOUT*EXP(ETA(7))


 BASE = KIN/KOUT

 A_0(4) = BASE   ;mean predose C5 concentration from the population (uM)


 ;DERIVED PARAMETERS
 K = CL/V2
 K23 = Q/V2
 K32 = Q/V3

 S2 = V2     ; AMT = mg, conc = mg/L

 ; Or EXP(LF1)/(1+EXP(LF1))

;CALCULATE TIME AFTER DOSE
 IF(NEWIND.NE.2) TDOS=0
 IF(AMT.GT.0) TDOS=TIME
 TAD=TIME-TDOS         ; TIME RELATIVE TO DOSE

$DES
 R = 0.5*(-(2*(A(2)/V2)+KD-A(4))+SQRT((2*(A(2)/V2)+KD-A(4))**2 + 4*KD*A(4)))                                ; Free target [conc]
 CONC1 = (A(2)/V2)*KD*KD/((KD+R)*(KD+R))                                                                    ; Drug in central cmt [conc]

 RC = 2*KD*(A(2)/V2)*R/((KD+R)**2)
 R2C = (A(2)/V2)*R*R/((KD+R)**2)

 DADT(1) = -KA*A(1)                                                                                         ; Drug depot [mass]
 DADT(2) = KA*A(1)+ K32*A(3) - (K+K23)*CONC1*V2 - (K*(A(2)/V2)*R*(2*KD+R)/((KD+R)*(KD+R)))*V2               ; Total Drug [mass]
 DADT(3) = K23*CONC1*V2 - K32*A(3)                                                                          ; Drug in second compartment [mass]
 DADT(4) = KIN - KOUT*R-K*(A(2)/V2)*2*R/(KD+R)                                                              ; Total protein [conc]


$ERROR (OBSERVATION ONLY)
 CALLFL = 0

 ;IPRED = LOG(F)
 ;W = SQRT(THETA(7)**2+THETA(8)**2/F**2)
 ;IRES = DV - IPRED
 ;IWRES = IRES/W
 ;Y = IPRED + W*EPS(1)

 EPS0 = 1E-5
 ;CP = 0.5*(A(2)/V2 - A(4)-KD) + 0.5*SQRT((A(2)/V2-A(4)-KD)**2 + 4*KD*A(2)/V2)
 CP = A(2)/S2
 IF (CP.LE.EPS0) CP = EPS0

 PD = A(4)

 PROP = EXP(THETA(8))*LOG(CP)
 ADD = EXP(THETA(7))
 SD1 = SQRT(PROP*PROP + ADD*ADD)
 SD2 = 1

 IPK = 0
 IPD = 0
 IF (CMT.EQ.2) IPK = 1
 IF (CMT.EQ.4) IPD = 1

 IPRED = IPK*LOG(CP) + IPD*LOG(PD)

 W = IPK*SD1 +  IPD*SD2

 LLOQ = 0.078 ; mg/L
 IF (BLOQ.EQ.0) THEN
   F_FLAG = 0
   Y     = IPK*LOG(CP)+IPK*SD1*EPS(1) +  IPD*LOG(PD)+IPD*SD2*EPS(2)
 ELSE
   F_FLAG = 1
   Y = IPK*PHI((LOG(LLOQ)-LOG(CP))/SD1)
 ENDIF


 IRES = DV-IPRED
 IWRES = IPK*IRES/SD1 + IPD*IRES/SD2


$ESTIMATION MAXEVAL=9999 NSIG=3 SIGL=9 METHOD=1 PRINT=5 NOABORT
            NOTHETABOUNDTEST NOOMEGABOUNDTEST NOSIGMABOUNDTEST
$COVARIANCE PRINT=E MATRIX=S
;$SIMULATION (20102) (330333 UNIFORM) ONLYSIM SUBPROBLEMS=1

;$EST   METHOD=ITS INTERACTION LAPLACIAN NITER=100 NSIG=3 SIGL=9 CTYPE=2 CINTERVAL=50 NOABORT PRINT=5  GRD=TS(7) NOCOV=1 FILE=blq.ext

;$EST   METHOD=SAEM INTERACTION LAPLACIAN NBURN=10000 NITER=1000 CTYPE=2 PRINT=50 NOCOV=1   CINTERVAL=50 ISAMPLE=2 GRD=TS(7) FILE=blq_saem.ext

;$EST   METHOD=IMP INTERACTION LAPLACIAN ISAMPLE=2000 NITER=10 EONLY=1 PRINT=1 MAPITER=0 NOCOV=0       GRD=TS(7) DF=0

;$COV   MATRIX=R COMPRESS UNCOND PRINT=E

;************************************************************

;**** TABLES ****

;************************************************************

;The 'standard' parameters, including IWRE, IPRE, TIME, and the NONMEM default items (DV, PRED, RES and WRES)
$TABLE      ROWID ID ARMAN TIME TAD CMT EVID IPRED PRED DV CP R RC R2C
            CONC1 MDV IWRES CWRES RES WRES TVCL CL TVV2 V2 TVQ Q TVV3
            V3 TVKA KA F1 WTKG ROUTIV TVKD KD TVKIN KIN TVKOUT KOUT
            ETA1 ETA2 ETA3 ETA4 ETA5 ETA6 ETA7 NOAPPEND NOPRINT
            ONEHEADER FILE=sdtab001
;The empirical Bayes estimates of individual model parameter values, or posthoc estimates.

;$TABLE ID  TVCL CL TVV2 V2 TVQ Q TVV3 V3 TVKA KA KD KIN KOUT F1 WTKG

;NOPRINT ONEHEADER FILE=patab001

;catab5: Categorical covariates, e.g. SEX, RACE.

;$TABLE ID ARMAN SEXN RACEN ETHNICN     NOPRINT NOAPPEND ONEHEADER FILE=catab001

;cotab5: Continuous covariates, e.g. WT, AGE.

;$TABLE ID  AGE  WGTBL HGTBL BMIBL NOPRINT NOAPPEND ONEHEADER FILE=cotab001

;mutab5, mytab5, extra5, xptab5: Additional variables of any kind. These might be useful

;if there are more covariates than can be accommodated in the covariates tables, for example,

;or if you have other variables that should be added, e.g. CMAX, AUC. Value

NM-TRAN MESSAGES
 WARNINGS AND ERRORS (IF ANY) FOR PROBLEM    1
 (WARNING  2) NM-TRAN INFERS THAT THE DATA ARE POPULATION.
 (WARNING  97) A RANDOM QUANTITY IS RAISED TO A POWER. IF THE RESULT AFFECTS
 THE VALUE OF THE OBJECTIVE FUNCTION, THE USER SHOULD ENSURE THAT THE
 RANDOM QUANTITY IS NEVER 0 WHEN THE POWER IS < 1.
 (WARNING  48) DES-DEFINED ITEMS ARE COMPUTED ONLY WHEN EVENT TIME
 INCREASES. E.G., DISPLAYED VALUES ASSOCIATED WITH THE FIRST EVENT RECORD
 OF AN INDIVIDUAL RECORD ARE COMPUTED WITH (THE LAST ADVANCE TO) AN EVENT
 TIME OF THE PRIOR INDIVIDUAL RECORD.

1NONLINEAR MIXED EFFECTS MODEL PROGRAM (NONMEM) VERSION 7.4.1
 ORIGINALLY DEVELOPED BY STUART BEAL, LEWIS SHEINER, AND ALISON BOECKMANN
 CURRENT DEVELOPERS ARE ROBERT BAUER, ICON DEVELOPMENT SOLUTIONS,
 AND ALISON BOECKMANN. IMPLEMENTATION, EFFICIENCY, AND STANDARDIZATION
 PERFORMED BY NOUS INFOSYSTEMS.
 PROBLEM NO.:         1
 QE-TMDD model for human studies
 TOT. NO. OF OBS RECS:     1055
 TOT. NO. OF INDIVIDUALS:       42
 GENERAL NONLINEAR KINETICS MODEL WITH STIFF/NONSTIFF EQUATIONS (LSODA, ADVAN13)
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 #TBLN:      1
 #METH: First Order Conditional Estimation
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
 #TERM:
0MINIMIZATION SUCCESSFUL
 HOWEVER, PROBLEMS OCCURRED WITH THE MINIMIZATION.
 REGARD THE RESULTS OF THE ESTIMATION STEP CAREFULLY, AND ACCEPT THEM ONLY
 AFTER CHECKING THAT THE COVARIANCE STEP PRODUCES REASONABLE OUTPUT.
 NO. OF FUNCTION EVALUATIONS USED:     4672
 NO. OF SIG. DIGITS IN FINAL EST.:  3.1

 ETABAR IS THE ARITHMETIC MEAN OF THE ETA-ESTIMATES,
 AND THE P-VALUE IS GIVEN FOR THE NULL HYPOTHESIS THAT THE TRUE MEAN IS 0.

 ETABAR:        -1.4022E-02  1.9054E-03  1.0205E-02 -6.8439E-03 -1.2714E-01  1.9894E-03  3.4452E-03 -6.8333E-10  1.5880E-03
 SE:             3.2884E-02  9.3408E-03  2.9055E-02  2.1121E-02  1.2579E-01  2.0305E-02  8.5867E-03  1.2266E-09  2.7467E-03
 N:                      42          42          42          42          42          42          42          42          42

 P VAL.:         6.6981E-01  8.3837E-01  7.2541E-01  7.4591E-01  3.1214E-01  9.2195E-01  6.8825E-01  5.7748E-01  5.6317E-01

 ETASHRINKSD(%)  4.6083E+00  8.6501E+00  4.5524E+01  5.0554E+01  3.1058E+01  1.4940E+01  4.4842E+01  9.9986E+01  9.5484E+01
 ETASHRINKVR(%)  9.0042E+00  1.6552E+01  7.0324E+01  7.5551E+01  5.2470E+01  2.7649E+01  6.9576E+01  1.0000E+02  9.9796E+01
 EBVSHRINKSD(%)  5.1854E+00  1.5197E+01  4.7676E+01  5.0749E+01  2.9281E+01  1.6142E+01  4.5500E+01  9.9986E+01  9.5453E+01
 EBVSHRINKVR(%)  1.0102E+01  2.8084E+01  7.2622E+01  7.5743E+01  4.9988E+01  2.9679E+01  7.0298E+01  1.0000E+02  9.9793E+01
 EPSSHRINKSD(%)  6.4786E+00  5.4892E+00
 EPSSHRINKVR(%)  1.2537E+01  1.0677E+01


 TOTAL DATA POINTS NORMALLY DISTRIBUTED (N):         1055
 N*LOG(2PI) CONSTANT TO OBJECTIVE FUNCTION:    1938.9603050618593
 OBJECTIVE FUNCTION VALUE WITHOUT CONSTANT:   -2012.5434828435784
 OBJECTIVE FUNCTION VALUE WITH CONSTANT:      -73.583177781719087
 REPORTED OBJECTIVE FUNCTION DOES NOT CONTAIN CONSTANT

 TOTAL EFFECTIVE ETAS (NIND*NETA):                           354


 #TERE:
 Elapsed estimation  time in seconds:  9052.59
 Elapsed covariance  time in seconds:   122.12
 Elapsed postprocess time in seconds:     4.01

 ********************                        FIRST ORDER CONDITIONAL ESTIMATION                      ********************
 #OBJT:**************                       MINIMUM VALUE OF OBJECTIVE FUNCTION                      ********************
 #OBJV:********************************************    -2012.543       **************************************************

 ********************                        FIRST ORDER CONDITIONAL ESTIMATION                      ********************
 ********************                             FINAL PARAMETER ESTIMATE                           ********************

 THETA - VECTOR OF FIXED EFFECTS PARAMETERS   *********
         TH 1      TH 2      TH 3      TH 4      TH 5      TH 6      TH 7      TH 8      TH 9      TH10      TH11      TH12
          TH13      TH14      TH15
         1.48E-01  3.21E+00  2.98E-02  5.97E-01  6.52E-01  1.60E-01 -5.67E+00 -7.09E+00  9.06E-01  2.91E+02  1.03E+01  1.35E-01
          1.27E+00  3.21E+01  9.31E-02

 OMEGA - COV MATRIX FOR RANDOM EFFECTS - ETAS  ********
         ETA1      ETA2      ETA3      ETA4      ETA5      ETA6      ETA7      ETA8      ETA9
 ETA1
+        5.11E-02
 ETA2
+       -1.16E-02  4.50E-03
 ETA3
+        0.00E+00 -1.52E-02  1.22E-01
 ETA4
+        0.00E+00  0.00E+00  0.00E+00  7.85E-02
 ETA5
+        0.00E+00  0.00E+00  0.00E+00  0.00E+00  1.43E+00
 ETA6
+        0.00E+00  0.00E+00  0.00E+00  0.00E+00  0.00E+00  2.45E-02
 ETA7
+        0.00E+00  0.00E+00  0.00E+00  0.00E+00  0.00E+00  0.00E+00  1.04E-02
 ETA8
+        0.00E+00  0.00E+00  0.00E+00  0.00E+00  0.00E+00  0.00E+00  0.00E+00  3.43E-09
 ETA9
+        0.00E+00  0.00E+00  0.00E+00  0.00E+00  0.00E+00  0.00E+00  0.00E+00  0.00E+00  1.59E-01

 SIGMA - COV MATRIX FOR RANDOM EFFECTS - EPSILONS  ****
         EPS1      EPS2
 EPS1
+        8.93E+03
 EPS2
+        0.00E+00  1.05E-02

 OMEGA - CORR MATRIX FOR RANDOM EFFECTS - ETAS  *******
         ETA1      ETA2      ETA3      ETA4      ETA5      ETA6      ETA7      ETA8      ETA9
 ETA1
+        2.26E-01
 ETA2
+       -7.62E-01  6.71E-02
 ETA3
+        0.00E+00 -6.47E-01  3.50E-01
 ETA4
+        0.00E+00  0.00E+00  0.00E+00  2.80E-01
 ETA5
+        0.00E+00  0.00E+00  0.00E+00  0.00E+00  1.20E+00
 ETA6
+        0.00E+00  0.00E+00  0.00E+00  0.00E+00  0.00E+00  1.57E-01
 ETA7
+        0.00E+00  0.00E+00  0.00E+00  0.00E+00  0.00E+00  0.00E+00  1.02E-01
 ETA8
+        0.00E+00  0.00E+00  0.00E+00  0.00E+00  0.00E+00  0.00E+00  0.00E+00  5.86E-05
 ETA9
+        0.00E+00  0.00E+00  0.00E+00  0.00E+00  0.00E+00  0.00E+00  0.00E+00  0.00E+00  3.99E-01

 SIGMA - CORR MATRIX FOR RANDOM EFFECTS - EPSILONS  ***
         EPS1      EPS2
 EPS1
+        9.45E+01
 EPS2
+        0.00E+00  1.03E-01

 ********************                        FIRST ORDER CONDITIONAL ESTIMATION                      ********************
 ********************                            STANDARD ERROR OF ESTIMATE                          ********************

 THETA - VECTOR OF FIXED EFFECTS PARAMETERS   *********
         TH 1      TH 2      TH 3      TH 4      TH 5      TH 6      TH 7      TH 8      TH 9      TH10      TH11      TH12
          TH13      TH14      TH15
         1.50E+01  5.99E-01  3.94E-02  5.37E-01  2.16E-01  7.43E-02  8.37E+02  8.36E+02  5.65E-01  1.78E+02  2.06E+00  2.76E-02
          2.03E+02  2.16E+03  1.50E+01

 OMEGA - COV MATRIX FOR RANDOM EFFECTS - ETAS  ********
         ETA1      ETA2      ETA3      ETA4      ETA5      ETA6      ETA7      ETA8      ETA9
 ETA1
+        7.93E+00
 ETA2
+        4.34E-02  5.42E-02
 ETA3
+       .........  2.10E-01  5.26E-01
 ETA4
+       ......... ......... .........  1.21E-01
 ETA5
+       ......... ......... ......... .........  1.16E+00
 ETA6
+       ......... ......... ......... ......... .........  3.99E-02
 ETA7
+       ......... ......... ......... ......... ......... .........  4.21E-02
 ETA8
+       ......... ......... ......... ......... ......... ......... .........  1.44E+00
 ETA9
+       ......... ......... ......... ......... ......... ......... ......... .........  9.68E+03

 SIGMA - COV MATRIX FOR RANDOM EFFECTS - EPSILONS  ****
         EPS1      EPS2
 EPS1
+        1.49E+07
 EPS2
+       .........  8.33E-04

 OMEGA - CORR MATRIX FOR RANDOM EFFECTS - ETAS  *******
         ETA1      ETA2      ETA3      ETA4      ETA5      ETA6      ETA7      ETA8      ETA9
 ETA1
+        1.75E+01
 ETA2
+        5.65E+01  4.04E-01
 ETA3
+       .........  9.71E+00  7.52E-01
 ETA4
+       ......... ......... .........  2.16E-01
 ETA5
+       ......... ......... ......... .........  4.84E-01
 ETA6
+       ......... ......... ......... ......... .........  1.27E-01
 ETA7
+       ......... ......... ......... ......... ......... .........  2.06E-01
 ETA8
+       ......... ......... ......... ......... ......... ......... .........  1.23E+04
 ETA9
+       ......... ......... ......... ......... ......... ......... ......... .........  1.21E+04

 SIGMA - CORR MATRIX FOR RANDOM EFFECTS - EPSILONS  ***
         EPS1      EPS2
 EPS1
+        2.23E+14
 EPS2
+       .........  4.06E-03
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
 ********************                        FIRST ORDER CONDITIONAL ESTIMATION                      ********************
 ********************                      EIGENVALUES OF COR MATRIX OF ESTIMATE                     ********************

             1         2         3         4         5         6         7         8         9        10        11        12
             13        14        15        16        17        18        19        20        21        22        23        24
            25        26        27        28
         7.30E-11  5.31E-10  8.56E-08  3.13E-06  1.24E-05  3.07E-03  3.27E-03  6.81E-03  2.28E-02  3.13E-02  5.44E-02  1.34E-01
          1.74E-01  2.16E-01  2.44E-01  3.25E-01  4.45E-01  5.54E-01  6.62E-01  8.38E-01  1.25E+00  1.41E+00  1.67E+00  2.08E+00
         2.86E+00  3.54E+00  3.86E+00  7.61E+00
 Elapsed finaloutput time in seconds:     0.13
 #CPUT: Total CPU Time in Seconds,     9181.806
