Fri May 10 12:27:42 EDT 2019
;; linear + MM model
; ~~~~~~~~~~~~~~~~~~~~~~~~~~~~~~~~~~~~~~~~~~~~~~~~~~~~~~~~~~~~~~~~~~~~~~~~~~~~
; model4: same as MM0028
;   2) turn off EMax model:  EMAX=0, HILL=0, T50=0
;
; ~~~~~~~~~~~~~~~~~~~~~~~~~~~~~~~~~~~~~~~~~~~~~~~~~~~~~~~~~~~~~~~~~~~~~~~~~~~~
$PROBLEM    REGN1979 PK
$INPUT      C=DROP CFLAG=DROP ROWID STDY ID USUBJID=DROP ARMA=DROP
            ARMAN COHORT=DROP COHORTN PCTPT=DROP TAD TIME NTIM DV DVOR
            DVORU=DROP TESTCAT=DROP TESTN TEST=DROP EVID CMT BLQ EXDUR
            EXDOSE AMT EXTRT=DROP EXROUTE=DROP EXROUTN RATE AGE
            AGEU=DROP RACE=DROP RACEN SEX=DROP SEXN ETHNIC=DROP
            ETHNICN WGTBL HGTBL BMIBL MDV
$DATA      nmdat3.csv IGNORE=C
$SUBROUTINE ADVAN6 TOL=6
$MODEL      COMP=(CENTRAL) ;CMT=1
            COMP=(PERIPH) ;CMT=2
$PK

  TVCL = THETA(1)
  TVV1 = THETA(2)
  TVV2 = THETA(3)
  TVQ =  THETA(4)

  TVVMAX = THETA(5)
  KM = THETA(6)

  PROP=THETA(7)
  ADD=THETA(8)

  WGT_ON_CLQ = THETA(9)
  WGT_ON_VSS = THETA(10)

  ; COVARIATE MODEL
  M_WT = 70 ; kg
  COVCL = WGT_ON_CLQ *(LOG(WGTBL)-LOG(M_WT))
  COVQ  = WGT_ON_CLQ *(LOG(WGTBL)-LOG(M_WT))

  COVV1 = WGT_ON_VSS *(LOG(WGTBL)-LOG(M_WT))
  COVV2 = WGT_ON_VSS *(LOG(WGTBL)-LOG(M_WT))

  CL = TVCL*EXP(ETA(1)+COVCL)          ; CL, INDIVIDUAL CLEARANCE (L/DAY)
  Q  = TVQ *EXP(ETA(1)+COVQ)           ; Q, INDIVIDUAL INTERCOMPARTMENTAL CLEARANCE (L/DAY)

  V1 = TVV1*EXP(ETA(2)+COVV1)          ; V2, INDIVIDUAL CENTRAL VOLUME (L)
  V2 = TVV2*EXP(ETA(2)+COVV2)          ; V3, INDIVIDUAL PERIPHERAL VOLUME (L)

  VMAX = TVVMAX*EXP(ETA(3))

  A_0(1) = 0                   ;INITIAL CONDITION FOR CENTRAL
  A_0(2) = 0                   ;INITIAL CONDITION FOR PERIPH

$DES
  CP= A(1)/V1
  DADT(1) = -(CL/V1)*A(1)-(Q/V1)*A(1)+(Q/V2)*A(2)-(VMAX*CP)/(KM+CP)
  DADT(2) =               (Q/V1)*A(1)-(Q/V2)*A(2)

$ERROR  (ONLY OBSERVATIONS)
  CONC = A(1)/V1

  SD=SQRT(PROP*PROP+ADD*ADD/CONC**2) ;  log-transformed
  ;SD=SQRT(ADD*ADD+PROP*PROP*CONC**2) ;  untransformed scale,  Standard deviation using proportional residual error

  IPRED=LOG(CONC)
  IRES  = DV - IPRED
  IWRES = IRES/SD
  Y     = IPRED + SD*ERR(1)

$THETA  (0,0.5) ; CL
 (0,6) ; V1
 (0,6) ; V2
 (0,2) ; Q
 (0,0.6) ; VMAX
 (0,0.5) ; KM
 (0,0.3) ; PROP ERR
 (0,0.3) ; ADD ERR
 (0,0.75) ; WGT_ON_CLQ
 (0,1.0) ; WGT_ON_VSS
$OMEGA  0.1  ;      II_CL
 0.1  ;      II_V1
 0.1  ;    II_VMAX
$SIGMA  1  FIX
$ESTIMATION MAXEVAL=9999 METHOD=1 INTERACTION PRINT=1 NOABORT NSIG=2
            MSFO=001.MSF
$COVARIANCE PRINT=E
$TABLE      ROWID ID TIME TESTN DV DVOR IPRED MDV AMT ETA1 ETA2 ETA3
            CL V1 V2 Q VMAX KM WGT_ON_CLQ WGT_ON_VSS PROP ADD IRES
            IWRES CWRES NOPRINT ONEHEADER FILE=sdtab001

NM-TRAN MESSAGES
 WARNINGS AND ERRORS (IF ANY) FOR PROBLEM    1
 (WARNING  2) NM-TRAN INFERS THAT THE DATA ARE POPULATION.

1NONLINEAR MIXED EFFECTS MODEL PROGRAM (NONMEM) VERSION 7.4.1
 ORIGINALLY DEVELOPED BY STUART BEAL, LEWIS SHEINER, AND ALISON BOECKMANN
 CURRENT DEVELOPERS ARE ROBERT BAUER, ICON DEVELOPMENT SOLUTIONS,
 AND ALISON BOECKMANN. IMPLEMENTATION, EFFICIENCY, AND STANDARDIZATION
 PERFORMED BY NOUS INFOSYSTEMS.
 PROBLEM NO.:         1
 REGN1979 PK
 TOT. NO. OF OBS RECS:    20584
 TOT. NO. OF INDIVIDUALS:     1000
 GENERAL NONLINEAR KINETICS MODEL (DVERK1, ADVAN6)
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 #TBLN:      1
 #METH: First Order Conditional Estimation with Interaction
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
 #TERM:
0MINIMIZATION SUCCESSFUL
 HOWEVER, PROBLEMS OCCURRED WITH THE MINIMIZATION.
 REGARD THE RESULTS OF THE ESTIMATION STEP CAREFULLY, AND ACCEPT THEM ONLY
 AFTER CHECKING THAT THE COVARIANCE STEP PRODUCES REASONABLE OUTPUT.
 NO. OF FUNCTION EVALUATIONS USED:      978
 NO. OF SIG. DIGITS IN FINAL EST.:  2.3

 ETABAR IS THE ARITHMETIC MEAN OF THE ETA-ESTIMATES,
 AND THE P-VALUE IS GIVEN FOR THE NULL HYPOTHESIS THAT THE TRUE MEAN IS 0.

 ETABAR:         4.2784E-02  2.9731E-02  1.4677E-01
 SE:             1.6168E-02  1.1080E-02  2.2157E-02
 N:                     985         985         985

 P VAL.:         8.1405E-03  7.2899E-03  3.5109E-11

 ETASHRINKSD(%)  2.8386E+01  1.0445E+01  1.9029E+01
 ETASHRINKVR(%)  4.8715E+01  1.9800E+01  3.4438E+01
 EBVSHRINKSD(%)  2.4825E+01  5.5681E+00  2.5119E+01
 EBVSHRINKVR(%)  4.3488E+01  1.0826E+01  4.3928E+01
 EPSSHRINKSD(%)  4.4090E+00
 EPSSHRINKVR(%)  8.6236E+00


 TOTAL DATA POINTS NORMALLY DISTRIBUTED (N):        20584
 N*LOG(2PI) CONSTANT TO OBJECTIVE FUNCTION:    37830.861534969961
 OBJECTIVE FUNCTION VALUE WITHOUT CONSTANT:   -24974.928919453341
 OBJECTIVE FUNCTION VALUE WITH CONSTANT:       12855.932615516620
 REPORTED OBJECTIVE FUNCTION DOES NOT CONTAIN CONSTANT

 TOTAL EFFECTIVE ETAS (NIND*NETA):                          2955


 #TERE:
 Elapsed estimation  time in seconds: 15301.57
 Elapsed covariance  time in seconds:  9043.93
 Elapsed postprocess time in seconds:    41.35

 ********************               FIRST ORDER CONDITIONAL ESTIMATION WITH INTERACTION              ********************
 #OBJT:**************                       MINIMUM VALUE OF OBJECTIVE FUNCTION                      ********************
 #OBJV:********************************************   -24974.929       **************************************************

 ********************               FIRST ORDER CONDITIONAL ESTIMATION WITH INTERACTION              ********************
 ********************                             FINAL PARAMETER ESTIMATE                           ********************

 THETA - VECTOR OF FIXED EFFECTS PARAMETERS   *********
         TH 1      TH 2      TH 3      TH 4      TH 5      TH 6      TH 7      TH 8      TH 9      TH10
         3.29E-01  4.05E+00  4.10E+00  7.79E-01  5.08E-01  3.66E-01  2.12E-01  4.40E-02  5.68E-01  8.57E-01

 OMEGA - COV MATRIX FOR RANDOM EFFECTS - ETAS  ********
         ETA1      ETA2      ETA3
 ETA1
+        5.03E-01
 ETA2
+        0.00E+00  1.51E-01
 ETA3
+        0.00E+00  0.00E+00  7.38E-01

 SIGMA - COV MATRIX FOR RANDOM EFFECTS - EPSILONS  ****
         EPS1
 EPS1
+        1.00E+00

 OMEGA - CORR MATRIX FOR RANDOM EFFECTS - ETAS  *******
         ETA1      ETA2      ETA3
 ETA1
+        7.09E-01
 ETA2
+        0.00E+00  3.88E-01
 ETA3
+        0.00E+00  0.00E+00  8.59E-01

 SIGMA - CORR MATRIX FOR RANDOM EFFECTS - EPSILONS  ***
         EPS1
 EPS1
+        1.00E+00

 ********************               FIRST ORDER CONDITIONAL ESTIMATION WITH INTERACTION              ********************
 ********************                            STANDARD ERROR OF ESTIMATE                          ********************

 THETA - VECTOR OF FIXED EFFECTS PARAMETERS   *********
         TH 1      TH 2      TH 3      TH 4      TH 5      TH 6      TH 7      TH 8      TH 9      TH10
         1.64E-03  2.09E-02  5.19E-02  3.38E-02  4.21E-03  6.21E-03  1.07E-03  1.41E-03  1.55E-03  1.31E-03

 OMEGA - COV MATRIX FOR RANDOM EFFECTS - ETAS  ********
         ETA1      ETA2      ETA3
 ETA1
+        2.24E-01
 ETA2
+       .........  3.98E-02
 ETA3
+       ......... .........  6.87E-02

 SIGMA - COV MATRIX FOR RANDOM EFFECTS - EPSILONS  ****
         EPS1
 EPS1
+       .........

 OMEGA - CORR MATRIX FOR RANDOM EFFECTS - ETAS  *******
         ETA1      ETA2      ETA3
 ETA1
+        1.58E-01
 ETA2
+       .........  5.13E-02
 ETA3
+       ......... .........  4.00E-02

 SIGMA - CORR MATRIX FOR RANDOM EFFECTS - EPSILONS  ***
         EPS1
 EPS1
+       .........
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
 ********************               FIRST ORDER CONDITIONAL ESTIMATION WITH INTERACTION              ********************
 ********************                      EIGENVALUES OF COR MATRIX OF ESTIMATE                     ********************

             1         2         3         4         5         6         7         8         9        10        11        12
             13
         2.77E-08  1.98E-07  3.05E-07  2.97E-06  9.94E-06  2.52E-05  1.77E-04  8.71E-04  3.47E-03  8.86E-03  1.87E-01  4.53E-01
          1.23E+01
 Elapsed finaloutput time in seconds:     1.60
 #CPUT: Total CPU Time in Seconds,    24423.341
