Sat Feb  2 19:22:14 UTC 2019
$PROBLEM    LN001 model with linear elimination (concentration only)
$INPUT      C=DROP ROWID USUBJID=DROP SUBJECTN ID TRTGROUP=DROP
            ARMA=DROP ARMAN VISIT VISITNUM TIMEPT=DROP NTIM TIME
            TIME_FLAG TAD OBS DV STDUNIT=DROP BLQ=DROP MDV TEST=DROP
            CMT EXROUTN EXDOSE EXDOSU=DROP EXTDOSE EXTDOSU=DROP
            EXDURAT=DROP EXSEQ AMT RATE AMTMKG AMTTOT RATEMKG RATETOT
            EVID AGE SEX=DROP SEXN RACE=DROP RACEN ETHNIC=DROP ETHNICN
            WEIGHTBL HEIGHTBL BMIBL ALB CRT ESP ALT AST
$DATA      nmdat4LN001.csv IGNORE=C

;IGNORE=@

;IGNORE=(FLAG.NE.0)

;IGNORE=(NOPK.EQ.1)
$SUBROUTINE ADVAN4 TRANS4
$PK
 IF (NEWIND.EQ.0) THEN
   LLOQ1 = 0.078 ; MG/L
 ENDIF

 TVCL = THETA(1)           ; POPULATION CLEARANCE (L/DAY)
 TVQ  = THETA(2)           ; POPULATION INTERCOMPARTMENTAL CLEARANCE (L/DAY)
 TVV2 = THETA(3)           ; POPULATION CENTRAL VOLUME (L)
 TVV3 = THETA(4)           ; POPULATION PERIPHERAL COMPARTMENT VOLUME (L)
 LF1  = THETA(5)           ; POPULATION BIOAVAIBILITY
 TVKA = THETA(6)           ; POPULATION ABSORPTION RATE CONSTANT (1/DAY)
 RUVCV = THETA(7)
 RUVSD = THETA(8)

 ; COVARIATE MODEL
 WT_ON_CLQ = THETA(9)
 WT_ON_VSS = THETA(10)

 M_WT = 75 ; kg
 COVCL = WT_ON_CLQ *(LOG(WEIGHTBL)-LOG(M_WT))
 COVQ  = WT_ON_CLQ *(LOG(WEIGHTBL)-LOG(M_WT))

 COVV2 = WT_ON_VSS *(LOG(WEIGHTBL)-LOG(M_WT))
 COVV3 = WT_ON_VSS *(LOG(WEIGHTBL)-LOG(M_WT))

 CL = TVCL*EXP(ETA(1)+COVCL)          ; CL, INDIVIDUAL CLEARANCE (L/DAY)
 Q  = TVQ *EXP(ETA(1)+COVQ)           ; Q, INDIVIDUAL INTERCOMPARTMENTAL CLEARANCE (L/DAY)

 V2 = TVV2*EXP(ETA(2)+COVV2)          ; V2, INDIVIDUAL CENTRAL VOLUME (L)
 V3 = TVV3*EXP(ETA(2)+COVV3)          ; V3, INDIVIDUAL PERIPHERAL VOLUME (L)

 KA = TVKA*EXP(ETA(3))                ; KA, INDIVIDUAL ABSORPTION RATE CONSTANT (1/DAY)


 ;DERIVED PARAMETERS
 K = CL/V2
 K23 = Q/V2
 K32 = Q/V3

 S2 = V2     ; dose = mg, conc = mg/L
 F1 = LF1    ; Or EXP(LF1)/(1+EXP(LF1))

;CALCULATE TIME AFTER DOSE
 IF(NEWIND.NE.2) TDOS=0
 IF(AMT.GT.0) TDOS=TIME
 ;TAD=TIME-TDOS         ; TIME RELATIVE TO DOSE


$ERROR  (OBSERVATION ONLY)
 CALLFL = 0

 EPS0 = 1E-5
 CONCI = A(2)/S2
 IF (CONCI.LE.EPS0) CONCI = EPS0
 IPRED = LOG(CONCI)

 PROP=EXP(RUVCV)*IPRED ; proportional part
 ADD=EXP(RUVSD) ; additive part
 SD=SQRT(PROP*PROP + ADD*ADD) ; Standard deviation using proportional residual error

 BLOQ1 = 0
 IF (BLOQ1.EQ.0) THEN
   F_FLAG = 0
   Y = IPRED + SD*ERR(1)
 ELSE
   F_FLAG = 1
   Y = PHI((LOG(LLOQ1)-LOG(CONCI))/SD)
 ENDIF

 IRES  = DV - IPRED
 IWRES = IRES/SD

$THETA  (0,0.15) ; TVCL
 (0,0.45) ; TVQ
 (0,3.00) ; TVV2
 (0,1.50) ; TVV3
 (0,0.70) ; TVF1
 (0,0.40) ; TVKA
 -10 ; RUVCV
 -1 ; RUVSD
 0.75 ; WT_ON_CLQ
 1.0 ; WT_ON_VSS
$OMEGA  BLOCK(2)
 0.1341  ;    IIV_CLQ
 0.0159127 0.0417008  ;    IIV_VSS
$OMEGA  0.01  ; OMEGA-4 IIV_KA
$SIGMA  1  FIX  ;    SIGMA-1
$ESTIMATION MAXEVAL=9999 NSIG=3 SIGL=9 METHOD=1 PRINT=10 NOABORT
            POSTHOC MSFO=001.MSF NOTHETABOUNDTEST NOOMEGABOUNDTEST
            NOSIGMABOUNDTEST
$COVARIANCE PRINT=E UNCONDITIONAL MATRIX=S SIGL=12
;$SIMULATION (20102) (330333 UNIFORM) ONLYSIM SUBPROBLEMS=1

;$EST   METHOD=ITS INTERACTION LAPLACIAN NITER=100 NSIG=3 SIGL=9 CTYPE=2 CINTERVAL=50 NOABORT PRINT=5  GRD=TS(7) NOCOV=1 FILE=blq.ext

;$EST   METHOD=SAEM INTERACTION LAPLACIAN NBURN=10000 NITER=1000 CTYPE=2 PRINT=50 NOCOV=1   CINTERVAL=50 ISAMPLE=2 GRD=TS(7) FILE=blq_saem.ext

;$EST   METHOD=IMP INTERACTION LAPLACIAN ISAMPLE=2000 NITER=10 EONLY=1 PRINT=1 MAPITER=0 NOCOV=0       GRD=TS(7) DF=0

;$COV   MATRIX=R COMPRESS UNCOND PRINT=E

;************************************************************

;**** TABLES ****

;************************************************************

;The 'standard' parameters, including IWRE, IPRE, TIME, and the NONMEM default items (DV, PRED, RES and WRES)
$TABLE      ROWID ID TIME TAD IPRED PRED DV MDV IWRES CWRES RES WRES
            ETA1 ETA2 ETA3 NOAPPEND NOPRINT ONEHEADER FILE=sdtab001
;The empirical Bayes estimates of individual model parameter values, or posthoc estimates.
$TABLE      ID CL Q V2 V3 F1 KA RUVCV RUVSD WT_ON_CLQ WT_ON_VSS
            NOPRINT ONEHEADER FILE=patab001
;catab5: Categorical covariates, e.g. SEX, RACE.

;$TABLE ID ARMAN SEXN RACEN ETHNICN     NOPRINT NOAPPEND ONEHEADER FILE=catab001

;cotab5: Continuous covariates, e.g. WT, AGE.

;$TABLE ID  AGE  WEIGHTBL HEIGHTBL BMIBL NOPRINT NOAPPEND ONEHEADER FILE=cotab001

;mutab5, mytab5, extra5, xptab5: Additional variables of any kind. These might be useful

;if there are more covariates than can be accommodated in the covariates tables, for example,

;or if you have other variables that should be added, e.g. CMAX, AUC. Value

NM-TRAN MESSAGES
 WARNINGS AND ERRORS (IF ANY) FOR PROBLEM    1
 (WARNING  2) NM-TRAN INFERS THAT THE DATA ARE POPULATION.

1NONLINEAR MIXED EFFECTS MODEL PROGRAM (NONMEM) VERSION 7.4.1
 ORIGINALLY DEVELOPED BY STUART BEAL, LEWIS SHEINER, AND ALISON BOECKMANN
 CURRENT DEVELOPERS ARE ROBERT BAUER, ICON DEVELOPMENT SOLUTIONS,
 AND ALISON BOECKMANN. IMPLEMENTATION, EFFICIENCY, AND STANDARDIZATION
 PERFORMED BY NOUS INFOSYSTEMS.
 PROBLEM NO.:         1
 LN001 model with linear elimination (concentration only)
 TOT. NO. OF OBS RECS:     1429
 TOT. NO. OF INDIVIDUALS:      110
 TWO COMPARTMENT MODEL WITH FIRST-ORDER ABSORPTION (ADVAN4)
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 #TBLN:      1
 #METH: First Order Conditional Estimation
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
 #TERM:
0MINIMIZATION SUCCESSFUL
 HOWEVER, PROBLEMS OCCURRED WITH THE MINIMIZATION.
 REGARD THE RESULTS OF THE ESTIMATION STEP CAREFULLY, AND ACCEPT THEM ONLY
 AFTER CHECKING THAT THE COVARIANCE STEP PRODUCES REASONABLE OUTPUT.
 NO. OF FUNCTION EVALUATIONS USED:      784
 NO. OF SIG. DIGITS IN FINAL EST.:  4.1

 ETABAR IS THE ARITHMETIC MEAN OF THE ETA-ESTIMATES,
 AND THE P-VALUE IS GIVEN FOR THE NULL HYPOTHESIS THAT THE TRUE MEAN IS 0.

 ETABAR:         1.4913E-03 -4.1924E-03 -4.8213E-03
 SE:             2.7373E-02  1.6601E-02  3.1460E-02
 N:                     110         110         110

 P VAL.:         9.5655E-01  8.0062E-01  8.7820E-01

 ETASHRINKSD(%)  1.8787E+00  8.1972E+00  2.0698E+01
 ETASHRINKVR(%)  3.7220E+00  1.5722E+01  3.7112E+01
 EBVSHRINKSD(%)  2.1238E+00  8.4652E+00  2.0732E+01
 EBVSHRINKVR(%)  4.2026E+00  1.6214E+01  3.7166E+01
 EPSSHRINKSD(%)  9.6622E+00
 EPSSHRINKVR(%)  1.8391E+01


 TOTAL DATA POINTS NORMALLY DISTRIBUTED (N):         1429
 N*LOG(2PI) CONSTANT TO OBJECTIVE FUNCTION:    2626.3263278989543
 OBJECTIVE FUNCTION VALUE WITHOUT CONSTANT:   -2959.8952686343473
 OBJECTIVE FUNCTION VALUE WITH CONSTANT:      -333.56894073539297
 REPORTED OBJECTIVE FUNCTION DOES NOT CONTAIN CONSTANT

 TOTAL EFFECTIVE ETAS (NIND*NETA):                           300


 #TERE:
 Elapsed estimation  time in seconds:    16.99
 Elapsed covariance  time in seconds:     1.09
 Elapsed postprocess time in seconds:     0.05

 ********************                        FIRST ORDER CONDITIONAL ESTIMATION                      ********************
 #OBJT:**************                       MINIMUM VALUE OF OBJECTIVE FUNCTION                      ********************
 #OBJV:********************************************    -2959.895       **************************************************

 ********************                        FIRST ORDER CONDITIONAL ESTIMATION                      ********************
 ********************                             FINAL PARAMETER ESTIMATE                           ********************

 THETA - VECTOR OF FIXED EFFECTS PARAMETERS   *********
         TH 1      TH 2      TH 3      TH 4      TH 5      TH 6      TH 7      TH 8      TH 9      TH10
         1.18E-01  3.69E-01  2.73E+00  2.11E+00  7.16E-01  2.48E-01 -1.53E+01 -1.82E+00  8.89E-01  6.80E-01

 OMEGA - COV MATRIX FOR RANDOM EFFECTS - ETAS  ********
         ETA1      ETA2      ETA3
 ETA1
+        8.64E-02
 ETA2
+        2.15E-02  3.63E-02
 ETA3
+        0.00E+00  0.00E+00  1.75E-01

 SIGMA - COV MATRIX FOR RANDOM EFFECTS - EPSILONS  ****
         EPS1
 EPS1
+        1.00E+00

 OMEGA - CORR MATRIX FOR RANDOM EFFECTS - ETAS  *******
         ETA1      ETA2      ETA3
 ETA1
+        2.94E-01
 ETA2
+        3.83E-01  1.91E-01
 ETA3
+        0.00E+00  0.00E+00  4.18E-01

 SIGMA - CORR MATRIX FOR RANDOM EFFECTS - EPSILONS  ***
         EPS1
 EPS1
+        1.00E+00

 ********************                        FIRST ORDER CONDITIONAL ESTIMATION                      ********************
 ********************                            STANDARD ERROR OF ESTIMATE                          ********************

 THETA - VECTOR OF FIXED EFFECTS PARAMETERS   *********
         TH 1      TH 2      TH 3      TH 4      TH 5      TH 6      TH 7      TH 8      TH 9      TH10
         7.75E-03  3.39E-02  1.77E-01  1.62E-01  4.98E-02  1.63E-02  4.48E+04  1.02E-02  1.77E-01  1.20E-01

 OMEGA - COV MATRIX FOR RANDOM EFFECTS - ETAS  ********
         ETA1      ETA2      ETA3
 ETA1
+        1.49E-02
 ETA2
+        6.25E-03  6.30E-03
 ETA3
+       ......... .........  3.41E-02

 SIGMA - COV MATRIX FOR RANDOM EFFECTS - EPSILONS  ****
         EPS1
 EPS1
+       .........

 OMEGA - CORR MATRIX FOR RANDOM EFFECTS - ETAS  *******
         ETA1      ETA2      ETA3
 ETA1
+        2.53E-02
 ETA2
+        8.68E-02  1.65E-02
 ETA3
+       ......... .........  4.08E-02

 SIGMA - CORR MATRIX FOR RANDOM EFFECTS - EPSILONS  ***
         EPS1
 EPS1
+       .........
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
 ********************                        FIRST ORDER CONDITIONAL ESTIMATION                      ********************
 ********************                      EIGENVALUES OF COR MATRIX OF ESTIMATE                     ********************

             1         2         3         4         5         6         7         8         9        10        11        12
             13        14
         5.09E-02  9.12E-02  1.47E-01  2.45E-01  3.83E-01  5.37E-01  7.06E-01  8.27E-01  1.02E+00  1.05E+00  1.24E+00  1.70E+00
          2.02E+00  3.99E+00
 Elapsed finaloutput time in seconds:     0.12
 #CPUT: Total CPU Time in Seconds,       18.269
