Thu Mar  7 18:55:14 UTC 2019
$PROBLEM    THEOPHYLLINE POPULATION DATA
$INPUT      C=DROP ID AMT TIME DV WGTBL SEXN
$DATA      DAT1.csv IGNORE=C

; model LN103
$SUBROUTINE ADVAN2
$PK
;THETA(1)=MEAN ABSORPTION RATE CONSTANT (1/HR)
;THETA(2)=MEAN ELIMINATION RATE CONSTANT (1/HR)
;THETA(3)=SLOPE OF CLEARANCE VS WEIGHT RELATIONSHIP (LITERS/HR/KG)
;SCALING PARAMETER=VOLUME/WGTBL SINCE DOSE IS WEIGHT-ADJUSTED
   CALLFL=1
   KA=THETA(1)+ETA(1)
   K=THETA(2)+ETA(2)
   CL=THETA(3)*WGTBL+ETA(3)
   SC=CL/K/WGTBL
SEX = 1

$THETA  (.1,3,5)
 (.008,.08,.5)
 (.004,.04,.9)
$OMEGA  BLOCK(3)
 6
 .005 .0002
 .3 .006 .4
$ERROR
  IPRED = F
  IRES = DV-IPRED
  ;PROP=SQRT(SIGMA(1,1))*IPRED
  ;ADD=0 ; SQRT(SIGMA(2,2))
  ; COV = SIGMA(1,2); if covariance is required between two epsilons
  ; SD=SQRT(PROP*PROP + ADD*ADD + 2*COV)  ; if covariance is required between two epsilons
  ;SD=SQRT(PROP*PROP + ADD*ADD)

  SD = SQRT(SIGMA(1,1))
  IWRES = IRES/SD
  Y = IPRED+EPS(1)

$SIGMA  .4
$ESTIMATION MAXEVAL=9999 NSIG=3 SIGL=9 METHOD=1 PRINT=10 NOABORT
            POSTHOC MSFO=001.MSF NOTHETABOUNDTEST NOOMEGABOUNDTEST
            NOSIGMABOUNDTEST
$COVARIANCE PRINT=E UNCONDITIONAL MATRIX=S SIGL=12
;************************************************************

;**** TABLES ****

;************************************************************
$TABLE      ID TIME DV MDV EVID IPRED IWRES CWRES ONEHEADER NOPRINT
            FILE=sdtab001
$TABLE      ID CL KA ETA1 ETA2 ETA3 ONEHEADER NOPRINT FILE=patab001
$TABLE      ID ONEHEADER NOPRINT FILE=catab001
$TABLE      ID WGTBL ONEHEADER NOPRINT FILE=cotab001
$TABLE      ID CL KA WGTBL ETA1 ETA2 ETA3 ONEHEADER NOPRINT
            FILE=mytab001

NM-TRAN MESSAGES
 WARNINGS AND ERRORS (IF ANY) FOR PROBLEM    1
 (WARNING  2) NM-TRAN INFERS THAT THE DATA ARE POPULATION.
 (WARNING  43) THE $PK BLOCK REQUESTS "CALL ONCE PER INDIVIDUAL RECORD", BUT
 DATA ITEMS ARE USED IN THE $PK BLOCK. VALUES OF THESE DATA ITEMS
 SUBSEQUENT TO THOSE FROM THE FIRST EVENT RECORD WILL BE IGNORED.  IF THIS
 IS NOT APPROPRIATE, THE CALL DATA ITEM CAN BE USED TO OBTAIN ADDITIONAL
 CALLS, OR $PK'S CALLING PROTOCOL SHOULD BE CHANGED.
 (WARNING  79) SIGMA IS USED ON THE RIGHT. WITH A SUBSEQUENT RUN, IF AN
 INITIAL ESTIMATE OF A DIAGONAL BLOCK OF SIGMA IS TO BE COMPUTED BY
 NONMEM, THAT BLOCK WILL BE SET TO AN IDENTITY MATRIX DURING THAT
 COMPUTATION. THIS COULD LEAD TO AN ARITHMETIC EXCEPTION.*
 * THE MAXIMUM NUMBER OF WARNINGS OF ONE OR MORE TYPES WAS REACHED.
 IT IS POSSIBLE THAT SOME WARNING MESSAGES WERE SUPPRESSED.

1NONLINEAR MIXED EFFECTS MODEL PROGRAM (NONMEM) VERSION 7.4.1
 ORIGINALLY DEVELOPED BY STUART BEAL, LEWIS SHEINER, AND ALISON BOECKMANN
 CURRENT DEVELOPERS ARE ROBERT BAUER, ICON DEVELOPMENT SOLUTIONS,
 AND ALISON BOECKMANN. IMPLEMENTATION, EFFICIENCY, AND STANDARDIZATION
 PERFORMED BY NOUS INFOSYSTEMS.
 PROBLEM NO.:         1
 THEOPHYLLINE POPULATION DATA
 TOT. NO. OF OBS RECS:      132
 TOT. NO. OF INDIVIDUALS:       12
 ONE COMPARTMENT MODEL WITH FIRST-ORDER ABSORPTION (ADVAN2)
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 #TBLN:      1
 #METH: First Order Conditional Estimation
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
 #TERM:
0MINIMIZATION SUCCESSFUL
 HOWEVER, PROBLEMS OCCURRED WITH THE MINIMIZATION.
 REGARD THE RESULTS OF THE ESTIMATION STEP CAREFULLY, AND ACCEPT THEM ONLY
 AFTER CHECKING THAT THE COVARIANCE STEP PRODUCES REASONABLE OUTPUT.
 NO. OF FUNCTION EVALUATIONS USED:      259
 NO. OF SIG. DIGITS IN FINAL EST.:  3.3

 ETABAR IS THE ARITHMETIC MEAN OF THE ETA-ESTIMATES,
 AND THE P-VALUE IS GIVEN FOR THE NULL HYPOTHESIS THAT THE TRUE MEAN IS 0.

 ETABAR:        -3.4263E-02 -6.4990E-05  2.7303E-03
 SE:             3.4052E-01  3.1227E-03  1.9000E-01
 N:                      12          12          12

 P VAL.:         9.1985E-01  9.8340E-01  9.8853E-01

 ETASHRINKSD(%)  2.5552E-02  2.0832E+00  9.2622E-01
 ETASHRINKVR(%)  5.1098E-02  4.1229E+00  1.8439E+00
 EBVSHRINKSD(%)  2.9134E+00  4.8973E+00  3.9797E+00
 EBVSHRINKVR(%)  5.7418E+00  9.5548E+00  7.8011E+00
 EPSSHRINKSD(%)  8.6124E+00
 EPSSHRINKVR(%)  1.6483E+01


 TOTAL DATA POINTS NORMALLY DISTRIBUTED (N):          132
 N*LOG(2PI) CONSTANT TO OBJECTIVE FUNCTION:    242.59977276603360
 OBJECTIVE FUNCTION VALUE WITHOUT CONSTANT:    114.65285750917947
 OBJECTIVE FUNCTION VALUE WITH CONSTANT:       357.25263027521305
 REPORTED OBJECTIVE FUNCTION DOES NOT CONTAIN CONSTANT

 TOTAL EFFECTIVE ETAS (NIND*NETA):                            36


 #TERE:
 Elapsed estimation  time in seconds:     0.39
 Elapsed covariance  time in seconds:     0.04
 Elapsed postprocess time in seconds:     0.02

 ********************                        FIRST ORDER CONDITIONAL ESTIMATION                      ********************
 #OBJT:**************                       MINIMUM VALUE OF OBJECTIVE FUNCTION                      ********************
 #OBJV:********************************************      114.653       **************************************************

 ********************                        FIRST ORDER CONDITIONAL ESTIMATION                      ********************
 ********************                             FINAL PARAMETER ESTIMATE                           ********************

 THETA - VECTOR OF FIXED EFFECTS PARAMETERS   *********
         TH 1      TH 2      TH 3
         1.86E+00  8.64E-02  4.02E-02

 OMEGA - COV MATRIX FOR RANDOM EFFECTS - ETAS  ********
         ETA1      ETA2      ETA3
 ETA1
+        1.52E+00
 ETA2
+        3.75E-03  1.33E-04
 ETA3
+       -6.69E-02  7.53E-03  4.81E-01

 SIGMA - COV MATRIX FOR RANDOM EFFECTS - EPSILONS  ****
         EPS1
 EPS1
+        4.76E-01

 OMEGA - CORR MATRIX FOR RANDOM EFFECTS - ETAS  *******
         ETA1      ETA2      ETA3
 ETA1
+        1.23E+00
 ETA2
+        2.64E-01  1.15E-02
 ETA3
+       -7.82E-02  9.41E-01  6.94E-01

 SIGMA - CORR MATRIX FOR RANDOM EFFECTS - EPSILONS  ***
         EPS1
 EPS1
+        6.90E-01

 ********************                        FIRST ORDER CONDITIONAL ESTIMATION                      ********************
 ********************                            STANDARD ERROR OF ESTIMATE                          ********************

 THETA - VECTOR OF FIXED EFFECTS PARAMETERS   *********
         TH 1      TH 2      TH 3
         8.65E-01  2.03E-02  1.31E-02

 OMEGA - COV MATRIX FOR RANDOM EFFECTS - ETAS  ********
         ETA1      ETA2      ETA3
 ETA1
+        4.17E+00
 ETA2
+        2.89E-02  5.02E-04
 ETA3
+        1.02E+00  1.48E-02  4.17E-01

 SIGMA - COV MATRIX FOR RANDOM EFFECTS - EPSILONS  ****
         EPS1
 EPS1
+        5.53E-02

 OMEGA - CORR MATRIX FOR RANDOM EFFECTS - ETAS  *******
         ETA1      ETA2      ETA3
 ETA1
+        1.69E+00
 ETA2
+        1.97E+00  2.18E-02
 ETA3
+        1.18E+00  9.37E-01  3.00E-01

 SIGMA - CORR MATRIX FOR RANDOM EFFECTS - EPSILONS  ***
         EPS1
 EPS1
+        4.01E-02

 ********************                        FIRST ORDER CONDITIONAL ESTIMATION                      ********************
 ********************                          COVARIANCE MATRIX OF ESTIMATE                         ********************

            TH 1      TH 2      TH 3      OM11      OM12      OM13      OM22      OM23      OM33      SG11
 TH 1
+        7.48E-01
 TH 2
+        2.54E-03  4.11E-04
 TH 3
+       -1.97E-03  2.26E-04  1.71E-04
 OM11
+       -1.60E+00  3.42E-02  4.04E-02  1.74E+01
 OM12
+       -1.35E-03  1.21E-04  6.95E-05 -3.08E-02  8.35E-04
 OM13
+       -1.47E-02  6.73E-03  4.33E-03 -3.46E-01  2.84E-02  1.04E+00
 OM22
+       -7.01E-05  5.21E-06  4.87E-06  9.23E-04  8.27E-06  3.34E-04  2.52E-07
 OM23
+       -2.12E-03  2.44E-04  1.83E-04  4.32E-02  8.27E-05  4.95E-03  6.04E-06  2.20E-04
 OM33
+       -1.89E-03  2.76E-03  2.36E-04 -3.24E-01 -2.62E-03 -1.31E-01 -4.39E-05  9.87E-04  1.74E-01
 SG11
+       -2.40E-02 -2.50E-04  1.11E-04  1.03E-01 -1.73E-04 -5.17E-03  6.41E-06  1.32E-04 -4.42E-03  3.06E-03

 ********************                        FIRST ORDER CONDITIONAL ESTIMATION                      ********************
 ********************                          CORRELATION MATRIX OF ESTIMATE                        ********************

            TH 1      TH 2      TH 3      OM11      OM12      OM13      OM22      OM23      OM33      SG11
 TH 1
+        8.65E-01
 TH 2
+        1.45E-01  2.03E-02
 TH 3
+       -1.74E-01  8.52E-01  1.31E-02
 OM11
+       -4.45E-01  4.04E-01  7.40E-01  4.17E+00
 OM12
+       -5.39E-02  2.07E-01  1.84E-01 -2.55E-01  2.89E-02
 OM13
+       -1.66E-02  3.25E-01  3.24E-01 -8.12E-02  9.65E-01  1.02E+00
 OM22
+       -1.61E-01  5.12E-01  7.42E-01  4.40E-01  5.70E-01  6.52E-01  5.02E-04
 OM23
+       -1.66E-01  8.12E-01  9.45E-01  6.98E-01  1.93E-01  3.27E-01  8.10E-01  1.48E-02
 OM33
+       -5.24E-03  3.26E-01  4.33E-02 -1.86E-01 -2.17E-01 -3.08E-01 -2.09E-01  1.60E-01  4.17E-01
 SG11
+       -5.02E-01 -2.23E-01  1.53E-01  4.46E-01 -1.08E-01 -9.16E-02  2.31E-01  1.61E-01 -1.92E-01  5.53E-02
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
 ********************                        FIRST ORDER CONDITIONAL ESTIMATION                      ********************
 ********************                      EIGENVALUES OF COR MATRIX OF ESTIMATE                     ********************

             1         2         3         4         5         6         7         8         9        10
         3.41E-03  5.32E-03  1.77E-02  6.50E-02  2.17E-01  4.83E-01  9.16E-01  1.82E+00  2.26E+00  4.21E+00
 Elapsed finaloutput time in seconds:     0.07
 #CPUT: Total CPU Time in Seconds,        0.416
