Thu Mar  7 17:46:29 UTC 2019
$PROBLEM    THEOPHYLLINE POPULATION DATA
$INPUT      C=DROP ID AMT TIME DV WGTBL SEXN
$DATA      DAT2.csv IGNORE=C

;ADVAN2 One Compartment Linear Model with First Order Absorption
$SUBROUTINE ADVAN2
$PK
;THETA(1)=MEAN ABSORPTION RATE CONSTANT (1/HR)
;THETA(2)=MEAN ELIMINATION RATE CONSTANT (1/HR)
;THETA(3)=SLOPE OF CLEARANCE VS WEIGHT RELATIONSHIP (LITERS/HR/KG)
;SCALING PARAMETER=VOLUME/WGTBL SINCE DOSE IS WEIGHT-ADJUSTED

   CALLFL=1
   KA=THETA(1)+ETA(1)
   K=THETA(2)+ETA(2)
   CL=THETA(3)*WGTBL+ETA(3)
   SC=CL/K/WGTBL
SEX = 1

$THETA  (.1,1,5) ; KA
 (.008,.08,1.5) ; K
 (.004,.04,1.9) ; CL
$OMEGA  BLOCK(3)
 6
 .005 .0002
 .3 .006 .4
$ERROR
  IPRED = F
  IRES = DV-IPRED
  PROP=SQRT(SIGMA(1,1))*IPRED
  ADD=SQRT(SIGMA(2,2))
  ; COV = SIGMA(1,2); if covariance is required between two epsilons
  ; SD=SQRT(PROP*PROP + ADD*ADD + 2*COV)  ; if covariance is required between two epsilons
  SD=SQRT(PROP*PROP + ADD*ADD)

  IWRES = IRES/SD
  Y = IPRED+IPRED*EPS(1) + EPS(2)

$SIGMA  0.02  ; proportional error
 0.1  ; additive error
$ESTIMATION METHOD=1 INTERACTION MAXEVAL=9999 SIG=3 PRINT=5 NOABORT
            POSTHOC MSFO=msf100
$COVARIANCE PRINT=E UNCONDITIONAL MATRIX=S SIGL=12
;************************************************************

;**** TABLES ****

;************************************************************

;The 'standard' parameters, including IWRE, IPRE, TIME, and the NONMEM default items (DV, PRED, RES and WRES)

;$TABLE ID TIME   PRED DV MDV CWRES RES WRES ETA1 ETA2 ETA3  NOAPPEND NOPRINT ONEHEADER  FILE=sdtab001

;The empirical Bayes estimates of individual model parameter values, or posthoc estimates.

;$TABLE ID  CL  KA  NOPRINT ONEHEADER FILE=patab001
$TABLE      ID TIME DV MDV EVID IPRED IWRES CWRES ONEHEADER NOPRINT
            FILE=sdtab001
$TABLE      ID CL KA ETA1 ETA2 ETA3 ONEHEADER NOPRINT FILE=patab001
$TABLE      ID ONEHEADER NOPRINT FILE=catab001
$TABLE      ID WGTBL ONEHEADER NOPRINT FILE=cotab001
$TABLE      ID CL KA WGTBL ETA1 ETA2 ETA3 ONEHEADER NOPRINT
            FILE=mytab001

NM-TRAN MESSAGES
 WARNINGS AND ERRORS (IF ANY) FOR PROBLEM    1
 (WARNING  2) NM-TRAN INFERS THAT THE DATA ARE POPULATION.
 (WARNING  43) THE $PK BLOCK REQUESTS "CALL ONCE PER INDIVIDUAL RECORD", BUT
 DATA ITEMS ARE USED IN THE $PK BLOCK. VALUES OF THESE DATA ITEMS
 SUBSEQUENT TO THOSE FROM THE FIRST EVENT RECORD WILL BE IGNORED.  IF THIS
 IS NOT APPROPRIATE, THE CALL DATA ITEM CAN BE USED TO OBTAIN ADDITIONAL
 CALLS, OR $PK'S CALLING PROTOCOL SHOULD BE CHANGED.
 (WARNING  79) SIGMA IS USED ON THE RIGHT. WITH A SUBSEQUENT RUN, IF AN
 INITIAL ESTIMATE OF A DIAGONAL BLOCK OF SIGMA IS TO BE COMPUTED BY
 NONMEM, THAT BLOCK WILL BE SET TO AN IDENTITY MATRIX DURING THAT
 COMPUTATION. THIS COULD LEAD TO AN ARITHMETIC EXCEPTION.*
 * THE MAXIMUM NUMBER OF WARNINGS OF ONE OR MORE TYPES WAS REACHED.
 IT IS POSSIBLE THAT SOME WARNING MESSAGES WERE SUPPRESSED.

1NONLINEAR MIXED EFFECTS MODEL PROGRAM (NONMEM) VERSION 7.4.1
 ORIGINALLY DEVELOPED BY STUART BEAL, LEWIS SHEINER, AND ALISON BOECKMANN
 CURRENT DEVELOPERS ARE ROBERT BAUER, ICON DEVELOPMENT SOLUTIONS,
 AND ALISON BOECKMANN. IMPLEMENTATION, EFFICIENCY, AND STANDARDIZATION
 PERFORMED BY NOUS INFOSYSTEMS.
 PROBLEM NO.:         1
 THEOPHYLLINE POPULATION DATA
 TOT. NO. OF OBS RECS:      132
 TOT. NO. OF INDIVIDUALS:       12
 ONE COMPARTMENT MODEL WITH FIRST-ORDER ABSORPTION (ADVAN2)
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 #TBLN:      1
 #METH: First Order Conditional Estimation with Interaction
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
 #TERM:
0MINIMIZATION SUCCESSFUL
 NO. OF FUNCTION EVALUATIONS USED:      357
 NO. OF SIG. DIGITS IN FINAL EST.:  3.7
0PARAMETER ESTIMATE IS NEAR ITS BOUNDARY

 ETABAR IS THE ARITHMETIC MEAN OF THE ETA-ESTIMATES,
 AND THE P-VALUE IS GIVEN FOR THE NULL HYPOTHESIS THAT THE TRUE MEAN IS 0.

 ETABAR:        -3.7184E-02  2.6620E-05  8.8349E-03
 SE:             3.0634E-01  3.3395E-03  1.9271E-01
 N:                      12          12          12

 P VAL.:         9.0339E-01  9.9364E-01  9.6343E-01

 ETASHRINKSD(%)  1.7372E-01  1.1498E+00  2.6493E-01
 ETASHRINKVR(%)  3.4714E-01  2.2864E+00  5.2915E-01
 EBVSHRINKSD(%)  3.1637E+00  4.7534E+00  4.0136E+00
 EBVSHRINKVR(%)  6.2273E+00  9.2808E+00  7.8661E+00
 EPSSHRINKSD(%)  7.9195E+00  8.4927E+00
 EPSSHRINKVR(%)  1.5212E+01  1.6264E+01


 TOTAL DATA POINTS NORMALLY DISTRIBUTED (N):          132
 N*LOG(2PI) CONSTANT TO OBJECTIVE FUNCTION:    242.59977276603360
 OBJECTIVE FUNCTION VALUE WITHOUT CONSTANT:    101.95628000849561
 OBJECTIVE FUNCTION VALUE WITH CONSTANT:       344.55605277452923
 REPORTED OBJECTIVE FUNCTION DOES NOT CONTAIN CONSTANT

 TOTAL EFFECTIVE ETAS (NIND*NETA):                            36


 #TERE:
 Elapsed estimation  time in seconds:     0.59
0S MATRIX ALGORITHMICALLY SINGULAR
0COVARIANCE MATRIX UNOBTAINABLE
 Elapsed covariance  time in seconds:     0.06
 Elapsed postprocess time in seconds:     0.02

 ********************               FIRST ORDER CONDITIONAL ESTIMATION WITH INTERACTION              ********************
 #OBJT:**************                       MINIMUM VALUE OF OBJECTIVE FUNCTION                      ********************
 #OBJV:********************************************      101.956       **************************************************

 ********************               FIRST ORDER CONDITIONAL ESTIMATION WITH INTERACTION              ********************
 ********************                             FINAL PARAMETER ESTIMATE                           ********************

 THETA - VECTOR OF FIXED EFFECTS PARAMETERS   *********
         TH 1      TH 2      TH 3
         1.72E+00  8.72E-02  4.07E-02

 OMEGA - COV MATRIX FOR RANDOM EFFECTS - ETAS  ********
         ETA1      ETA2      ETA3
 ETA1
+        1.23E+00
 ETA2
+        2.53E-03  1.49E-04
 ETA3
+       -9.59E-02  8.13E-03  4.89E-01

 SIGMA - COV MATRIX FOR RANDOM EFFECTS - EPSILONS  ****
         EPS1      EPS2
 EPS1
+        1.82E-02
 EPS2
+        0.00E+00  7.14E-02

 OMEGA - CORR MATRIX FOR RANDOM EFFECTS - ETAS  *******
         ETA1      ETA2      ETA3
 ETA1
+        1.11E+00
 ETA2
+        1.87E-01  1.22E-02
 ETA3
+       -1.23E-01  9.52E-01  6.99E-01

 SIGMA - CORR MATRIX FOR RANDOM EFFECTS - EPSILONS  ***
         EPS1      EPS2
 EPS1
+        1.35E-01
 EPS2
+        0.00E+00  2.67E-01
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 Elapsed finaloutput time in seconds:     0.06
 #CPUT: Total CPU Time in Seconds,        0.605
